*Heading
** Job name: elastic_console_beam Model name: Model-1
** Generated by: Abaqus/CAE 2023
*Preprint, echo=NO, model=NO, history=NO, contact=NO
**
** PARTS
**
*Part, name=Part-1
*Node
      1,       -0.625, 0.0250000004, 0.0500000007
      2,       -0.625, 0.0583333336, 0.0500000007
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*Element, type=C3D8R
  1,  13,  14,  18,  17,   1,   2,   6,   5
  2,  14,  15,  19,  18,   2,   3,   7,   6
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*Nset, nset=Set-1, generate
   1,  492,    1
*Elset, elset=Set-1, generate
   1,  240,    1
** Section: Steel-section
*Solid Section, elset=Set-1, material=Steel
,
*End Part
**
**
** ASSEMBLY
**
*Assembly, name=Assembly
**
*Instance, name=Part-1-1, part=Part-1
*End Instance
**
*Nset, nset=Set-1, instance=Part-1-1, generate
  1,  12,   1
*Elset, elset=Set-1, instance=Part-1-1, generate
 1,  6,  1
*Nset, nset=Set-2, instance=Part-1-1, generate
 484,  492,    4
*Elset, elset=Set-2, instance=Part-1-1
 237, 240
*End Assembly
**
** MATERIALS
**
*Material, name=Steel
*Elastic
 2.1e+11, 0.3
** ----------------------------------------------------------------
**
** STEP: Step-1
**
*Step, name=Step-1, nlgeom=NO
*Static
1., 1., 1e-05, 1.
**
** BOUNDARY CONDITIONS
**
** Name: BC-1 Type: Displacement/Rotation
*Boundary
Set-1, 1, 1
Set-1, 2, 2
Set-1, 3, 3
Set-1, 4, 4
Set-1, 5, 5
Set-1, 6, 6
** Name: BC-2 Type: Displacement/Rotation
*Boundary
Set-2, 2, 2, -0.5
**
** OUTPUT REQUESTS
**
*Restart, write, frequency=0
**
** FIELD OUTPUT: F-Output-1
**
*Output, field, variable=PRESELECT
**
** HISTORY OUTPUT: H-Output-1
**
*Output, history, variable=PRESELECT
*End Step
